# Расчет измеряемого значения для датчика SCT-013-030
# Входные данные:
# Характеристики датчика:
Usens_max := 1  # V, максимальное выходное напряжение
Isens_max := 30  # A, максимальный измеряемый ток
Rsens := 62  # Ohm, значение встроенного сопротивления
Nsens := 1800  # шт, количество витков в обмотке
# Характеристики сети:
Unet := 224  # V, напряжение сети
# Характеристики нагрузки:
Pdev := 1600  # W, потребляемая мощность
# Характеристики микроконтроллера:
Vref := 2.5  # V, опроное напряжение для АЦП
# Измеренные значения:
Umes := 86.2*10^-3  # V, напряжение на выходе датчика
# Расчеты:
# Расчет потребляемого нагрузкой тока, исходя из паспортных данных:
Idev := Pdev/Unet = 7.14286  # A, ток нагрузки
# Расчет потребляемого тока нагрузки, исходя из имеющихся данных измерений:
Imes := Umes*Vref*Isens_max = 6.465  # A, ток нагрузки
# Расчет погрешности измеренного значения тока нагрузки относительно полученного значения на основе рассчета по паспортным данным:
ΔI := |Idev - Imes| = 0.677857  # A, погрешность измерения
ΔIpercent := ΔI/Idev*100 = 9.49  # %, погрешность измерения
# Расчет потребляемой мощности нагрузкой, исходя из имеющихся данных измерений:
Pmes := Imes*Unet = 1448.16  # W, потребляемая мощность
# Расчет погрешности измеренного значения потребляемой мощности нагрузки относительно полученного значения на основе рассчета по паспортным данным:
ΔP := |Pdev - Pmes| = 151.84  # P, погрешность измерения
ΔPpercent := ΔP/Pdev*100 = 9.49  # %, погрешность измерения
